/prep7

! Begin writing grain materials
*SET,matid,4
TB,ELAS,matid,,9,
TBDATA,1,70000.0,70000.0,70000.0,50724.637681159424,50724.637681159424,50724.637681159424
TBDATA,7,0.38,0.38,0.38
TB,CTE,matid,
TBDATA,1,1.28e-05,1.28e-05,1.28e-05
TB,PLAS,matid
TB,XTAL,matid,,3,ORIE
TBDATA,1,156.57144,0.0,0.0
TB,XTAL,matid,,1,NSLFAM
TBDATA,1,1
TB,XTAL,matid,,1,FORM
TBDATA,1,2
TB,XTAL,matid,,6,XPARAM
TBDATA,1,1,0,4,12,0,1
TB,XTAL,matid,1,6,HARD
TBTEMP, 298.0,
TBDATA,1,220.0,1750.0,400.0,2,0,1.4
TB,XTAL,matid,1,6,FLFCC
TBTEMP, 298.0,
TBDATA,1,1732000.0,0.131,1.1,0.7,2.5e-19,1
CMSEL,S,GID4
EMODIF,ALL,MAT,matid
ALLSEL,ALL


*SET,matid,9
TB,ELAS,matid,,9,
TBDATA,1,70000.0,70000.0,70000.0,50724.637681159424,50724.637681159424,50724.637681159424
TBDATA,7,0.38,0.38,0.38
TB,CTE,matid,
TBDATA,1,1.28e-05,1.28e-05,1.28e-05
TB,PLAS,matid
TB,XTAL,matid,,3,ORIE
TBDATA,1,140.51831,0.0,0.0
TB,XTAL,matid,,1,NSLFAM
TBDATA,1,1
TB,XTAL,matid,,1,FORM
TBDATA,1,2
TB,XTAL,matid,,6,XPARAM
TBDATA,1,1,0,9,12,0,1
TB,XTAL,matid,1,6,HARD
TBTEMP, 298.0,
TBDATA,1,220.0,1750.0,400.0,2,0,1.4
TB,XTAL,matid,1,6,FLFCC
TBTEMP, 298.0,
TBDATA,1,1732000.0,0.131,1.1,0.7,2.5e-19,1
CMSEL,S,GID9
EMODIF,ALL,MAT,matid
ALLSEL,ALL


*SET,matid,7
TB,ELAS,matid,,9,
TBDATA,1,70000.0,70000.0,70000.0,50724.637681159424,50724.637681159424,50724.637681159424
TBDATA,7,0.38,0.38,0.38
TB,CTE,matid,
TBDATA,1,1.28e-05,1.28e-05,1.28e-05
TB,PLAS,matid
TB,XTAL,matid,,3,ORIE
TBDATA,1,108.68475,0.0,0.0
TB,XTAL,matid,,1,NSLFAM
TBDATA,1,1
TB,XTAL,matid,,1,FORM
TBDATA,1,2
TB,XTAL,matid,,6,XPARAM
TBDATA,1,1,0,7,12,0,1
TB,XTAL,matid,1,6,HARD
TBTEMP, 298.0,
TBDATA,1,220.0,1750.0,400.0,2,0,1.4
TB,XTAL,matid,1,6,FLFCC
TBTEMP, 298.0,
TBDATA,1,1732000.0,0.131,1.1,0.7,2.5e-19,1
CMSEL,S,GID7
EMODIF,ALL,MAT,matid
ALLSEL,ALL


*SET,matid,1
TB,ELAS,matid,,9,
TBDATA,1,70000.0,70000.0,70000.0,50724.637681159424,50724.637681159424,50724.637681159424
TBDATA,7,0.38,0.38,0.38
TB,CTE,matid,
TBDATA,1,1.28e-05,1.28e-05,1.28e-05
TB,PLAS,matid
TB,XTAL,matid,,3,ORIE
TBDATA,1,41.47339,0.0,0.0
TB,XTAL,matid,,1,NSLFAM
TBDATA,1,1
TB,XTAL,matid,,1,FORM
TBDATA,1,2
TB,XTAL,matid,,6,XPARAM
TBDATA,1,1,0,1,12,0,1
TB,XTAL,matid,1,6,HARD
TBTEMP, 298.0,
TBDATA,1,220.0,1750.0,400.0,2,0,1.4
TB,XTAL,matid,1,6,FLFCC
TBTEMP, 298.0,
TBDATA,1,1732000.0,0.131,1.1,0.7,2.5e-19,1
CMSEL,S,GID1
EMODIF,ALL,MAT,matid
ALLSEL,ALL


*SET,matid,8
TB,ELAS,matid,,9,
TBDATA,1,70000.0,70000.0,70000.0,50724.637681159424,50724.637681159424,50724.637681159424
TBDATA,7,0.38,0.38,0.38
TB,CTE,matid,
TBDATA,1,1.28e-05,1.28e-05,1.28e-05
TB,PLAS,matid
TB,XTAL,matid,,3,ORIE
TBDATA,1,-102.53095,0.0,0.0
TB,XTAL,matid,,1,NSLFAM
TBDATA,1,1
TB,XTAL,matid,,1,FORM
TBDATA,1,2
TB,XTAL,matid,,6,XPARAM
TBDATA,1,1,0,8,12,0,1
TB,XTAL,matid,1,6,HARD
TBTEMP, 298.0,
TBDATA,1,220.0,1750.0,400.0,2,0,1.4
TB,XTAL,matid,1,6,FLFCC
TBTEMP, 298.0,
TBDATA,1,1732000.0,0.131,1.1,0.7,2.5e-19,1
CMSEL,S,GID8
EMODIF,ALL,MAT,matid
ALLSEL,ALL


*SET,matid,5
TB,ELAS,matid,,9,
TBDATA,1,70000.0,70000.0,70000.0,50724.637681159424,50724.637681159424,50724.637681159424
TBDATA,7,0.38,0.38,0.38
TB,CTE,matid,
TBDATA,1,1.28e-05,1.28e-05,1.28e-05
TB,PLAS,matid
TB,XTAL,matid,,3,ORIE
TBDATA,1,55.727448,0.0,0.0
TB,XTAL,matid,,1,NSLFAM
TBDATA,1,1
TB,XTAL,matid,,1,FORM
TBDATA,1,2
TB,XTAL,matid,,6,XPARAM
TBDATA,1,1,0,5,12,0,1
TB,XTAL,matid,1,6,HARD
TBTEMP, 298.0,
TBDATA,1,220.0,1750.0,400.0,2,0,1.4
TB,XTAL,matid,1,6,FLFCC
TBTEMP, 298.0,
TBDATA,1,1732000.0,0.131,1.1,0.7,2.5e-19,1
CMSEL,S,GID5
EMODIF,ALL,MAT,matid
ALLSEL,ALL


*SET,matid,2
TB,ELAS,matid,,9,
TBDATA,1,70000.0,70000.0,70000.0,50724.637681159424,50724.637681159424,50724.637681159424
TBDATA,7,0.38,0.38,0.38
TB,CTE,matid,
TBDATA,1,1.28e-05,1.28e-05,1.28e-05
TB,PLAS,matid
TB,XTAL,matid,,3,ORIE
TBDATA,1,98.362946,0.0,0.0
TB,XTAL,matid,,1,NSLFAM
TBDATA,1,1
TB,XTAL,matid,,1,FORM
TBDATA,1,2
TB,XTAL,matid,,6,XPARAM
TBDATA,1,1,0,2,12,0,1
TB,XTAL,matid,1,6,HARD
TBTEMP, 298.0,
TBDATA,1,220.0,1750.0,400.0,2,0,1.4
TB,XTAL,matid,1,6,FLFCC
TBTEMP, 298.0,
TBDATA,1,1732000.0,0.131,1.1,0.7,2.5e-19,1
CMSEL,S,GID2
EMODIF,ALL,MAT,matid
ALLSEL,ALL


*SET,matid,6
TB,ELAS,matid,,9,
TBDATA,1,70000.0,70000.0,70000.0,50724.637681159424,50724.637681159424,50724.637681159424
TBDATA,7,0.38,0.38,0.38
TB,CTE,matid,
TBDATA,1,1.28e-05,1.28e-05,1.28e-05
TB,PLAS,matid
TB,XTAL,matid,,3,ORIE
TBDATA,1,75.59474,0.0,0.0
TB,XTAL,matid,,1,NSLFAM
TBDATA,1,1
TB,XTAL,matid,,1,FORM
TBDATA,1,2
TB,XTAL,matid,,6,XPARAM
TBDATA,1,1,0,6,12,0,1
TB,XTAL,matid,1,6,HARD
TBTEMP, 298.0,
TBDATA,1,220.0,1750.0,400.0,2,0,1.4
TB,XTAL,matid,1,6,FLFCC
TBTEMP, 298.0,
TBDATA,1,1732000.0,0.131,1.1,0.7,2.5e-19,1
CMSEL,S,GID6
EMODIF,ALL,MAT,matid
ALLSEL,ALL


*SET,matid,3
TB,ELAS,matid,,9,
TBDATA,1,70000.0,70000.0,70000.0,50724.637681159424,50724.637681159424,50724.637681159424
TBDATA,7,0.38,0.38,0.38
TB,CTE,matid,
TBDATA,1,1.28e-05,1.28e-05,1.28e-05
TB,PLAS,matid
TB,XTAL,matid,,3,ORIE
TBDATA,1,122.751465,0.0,0.0
TB,XTAL,matid,,1,NSLFAM
TBDATA,1,1
TB,XTAL,matid,,1,FORM
TBDATA,1,2
TB,XTAL,matid,,6,XPARAM
TBDATA,1,1,0,3,12,0,1
TB,XTAL,matid,1,6,HARD
TBTEMP, 298.0,
TBDATA,1,220.0,1750.0,400.0,2,0,1.4
TB,XTAL,matid,1,6,FLFCC
TBTEMP, 298.0,
TBDATA,1,1732000.0,0.131,1.1,0.7,2.5e-19,1
CMSEL,S,GID3
EMODIF,ALL,MAT,matid
ALLSEL,ALL


allsel,all
TREF, 298.0
TUNIF, 298.0
/solu
