/PREP7
! Begin writing named selections

CMBLOCK,GID1,ELEM,       221
(8i10)
       643       644       645       646       647       648       649       650
       691       692       693       694       695       696       697       698
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CMBLOCK,GID2,ELEM,       551
(8i10)
      1317      1318      1319      1365      1366      1367      1368      1369
      1370      1413      1414      1415      1416      1417      1418      1419
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CMBLOCK,GID3,ELEM,       271
(8i10)
      1881      1882      1883      1884      1885      1886      1887      1888
      1889      1890      1930      1931      1932      1933      1934      1935
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CMBLOCK,GID4,ELEM,       330
(8i10)
         1         2         3         4         5         6         7         8
         9        10        11        12        13        14        15        16
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CMBLOCK,GID5,ELEM,       192
(8i10)
       908       909       910       911       912       913       914       951
       952       953       954       955       956       957       958       959
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CMBLOCK,GID6,ELEM,       171
(8i10)
      1397      1398      1399      1400      1445      1446      1447      1448
      1449      1450      1493      1494      1495      1496      1497      1498
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CMBLOCK,GID7,ELEM,       207
(8i10)
       420       421       422       423       470       471       472       473
       474       519       520       521       522       523       524       525
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CMBLOCK,GID8,ELEM,       169
(8i10)
       729       730       731       779       780       781       782       783
       784       829       830       831       832       833       834       835
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CMBLOCK,GID9,ELEM,       388
(8i10)
        20        21        22        23        24        25        26        27
        28        29        30        31        32        33        34        35
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! Model contains 9 grains


! Begin writing grain materials
*SET,matid,1
TB,ELAS,matid,,9,
TBDATA,1,70000.0,70000.0,70000.0,50724.637681159424,50724.637681159424,50724.637681159424
TBDATA,7,0.38,0.38,0.38
TB,CTE,matid,
TBDATA,1,1.28e-05,1.28e-05,1.28e-05
TB,PLAS,matid
TB,XTAL,matid,,3,ORIE
TBDATA,1,41.473388671875,0.0,0.0
TB,XTAL,matid,,1,NSLFAM
TBDATA,1,1
TB,XTAL,matid,,1,FORM
TBDATA,1,2
TB,XTAL,matid,,6,XPARAM
TBDATA,1,1,0,1,12,0,1
TB,XTAL,matid,1,6,HARD
TBTEMP,298.0,
TBDATA,1,220.0,1750.0,400.0,2,0,1.4
TB,XTAL,matid,1,6,FLFCC
TBTEMP,298.0,
TBDATA,1,1732000.0,0.131,1.1,0.7,2.5e-19,1
CMSEL,S,GID1
EMODIF,ALL,MAT,matid
ALLSEL,ALL


*SET,matid,2
TB,ELAS,matid,,9,
TBDATA,1,70000.0,70000.0,70000.0,50724.637681159424,50724.637681159424,50724.637681159424
TBDATA,7,0.38,0.38,0.38
TB,CTE,matid,
TBDATA,1,1.28e-05,1.28e-05,1.28e-05
TB,PLAS,matid
TB,XTAL,matid,,3,ORIE
TBDATA,1,98.36294555664062,0.0,0.0
TB,XTAL,matid,,1,NSLFAM
TBDATA,1,1
TB,XTAL,matid,,1,FORM
TBDATA,1,2
TB,XTAL,matid,,6,XPARAM
TBDATA,1,1,0,2,12,0,1
TB,XTAL,matid,1,6,HARD
TBTEMP,298.0,
TBDATA,1,220.0,1750.0,400.0,2,0,1.4
TB,XTAL,matid,1,6,FLFCC
TBTEMP,298.0,
TBDATA,1,1732000.0,0.131,1.1,0.7,2.5e-19,1
CMSEL,S,GID2
EMODIF,ALL,MAT,matid
ALLSEL,ALL


*SET,matid,3
TB,ELAS,matid,,9,
TBDATA,1,70000.0,70000.0,70000.0,50724.637681159424,50724.637681159424,50724.637681159424
TBDATA,7,0.38,0.38,0.38
TB,CTE,matid,
TBDATA,1,1.28e-05,1.28e-05,1.28e-05
TB,PLAS,matid
TB,XTAL,matid,,3,ORIE
TBDATA,1,122.75146484375,0.0,0.0
TB,XTAL,matid,,1,NSLFAM
TBDATA,1,1
TB,XTAL,matid,,1,FORM
TBDATA,1,2
TB,XTAL,matid,,6,XPARAM
TBDATA,1,1,0,3,12,0,1
TB,XTAL,matid,1,6,HARD
TBTEMP,298.0,
TBDATA,1,220.0,1750.0,400.0,2,0,1.4
TB,XTAL,matid,1,6,FLFCC
TBTEMP,298.0,
TBDATA,1,1732000.0,0.131,1.1,0.7,2.5e-19,1
CMSEL,S,GID3
EMODIF,ALL,MAT,matid
ALLSEL,ALL


*SET,matid,4
TB,ELAS,matid,,9,
TBDATA,1,70000.0,70000.0,70000.0,50724.637681159424,50724.637681159424,50724.637681159424
TBDATA,7,0.38,0.38,0.38
TB,CTE,matid,
TBDATA,1,1.28e-05,1.28e-05,1.28e-05
TB,PLAS,matid
TB,XTAL,matid,,3,ORIE
TBDATA,1,156.57144165039062,0.0,0.0
TB,XTAL,matid,,1,NSLFAM
TBDATA,1,1
TB,XTAL,matid,,1,FORM
TBDATA,1,2
TB,XTAL,matid,,6,XPARAM
TBDATA,1,1,0,4,12,0,1
TB,XTAL,matid,1,6,HARD
TBTEMP,298.0,
TBDATA,1,220.0,1750.0,400.0,2,0,1.4
TB,XTAL,matid,1,6,FLFCC
TBTEMP,298.0,
TBDATA,1,1732000.0,0.131,1.1,0.7,2.5e-19,1
CMSEL,S,GID4
EMODIF,ALL,MAT,matid
ALLSEL,ALL


*SET,matid,5
TB,ELAS,matid,,9,
TBDATA,1,70000.0,70000.0,70000.0,50724.637681159424,50724.637681159424,50724.637681159424
TBDATA,7,0.38,0.38,0.38
TB,CTE,matid,
TBDATA,1,1.28e-05,1.28e-05,1.28e-05
TB,PLAS,matid
TB,XTAL,matid,,3,ORIE
TBDATA,1,55.727447509765625,0.0,0.0
TB,XTAL,matid,,1,NSLFAM
TBDATA,1,1
TB,XTAL,matid,,1,FORM
TBDATA,1,2
TB,XTAL,matid,,6,XPARAM
TBDATA,1,1,0,5,12,0,1
TB,XTAL,matid,1,6,HARD
TBTEMP,298.0,
TBDATA,1,220.0,1750.0,400.0,2,0,1.4
TB,XTAL,matid,1,6,FLFCC
TBTEMP,298.0,
TBDATA,1,1732000.0,0.131,1.1,0.7,2.5e-19,1
CMSEL,S,GID5
EMODIF,ALL,MAT,matid
ALLSEL,ALL


*SET,matid,6
TB,ELAS,matid,,9,
TBDATA,1,70000.0,70000.0,70000.0,50724.637681159424,50724.637681159424,50724.637681159424
TBDATA,7,0.38,0.38,0.38
TB,CTE,matid,
TBDATA,1,1.28e-05,1.28e-05,1.28e-05
TB,PLAS,matid
TB,XTAL,matid,,3,ORIE
TBDATA,1,75.59474182128906,0.0,0.0
TB,XTAL,matid,,1,NSLFAM
TBDATA,1,1
TB,XTAL,matid,,1,FORM
TBDATA,1,2
TB,XTAL,matid,,6,XPARAM
TBDATA,1,1,0,6,12,0,1
TB,XTAL,matid,1,6,HARD
TBTEMP,298.0,
TBDATA,1,220.0,1750.0,400.0,2,0,1.4
TB,XTAL,matid,1,6,FLFCC
TBTEMP,298.0,
TBDATA,1,1732000.0,0.131,1.1,0.7,2.5e-19,1
CMSEL,S,GID6
EMODIF,ALL,MAT,matid
ALLSEL,ALL


*SET,matid,7
TB,ELAS,matid,,9,
TBDATA,1,70000.0,70000.0,70000.0,50724.637681159424,50724.637681159424,50724.637681159424
TBDATA,7,0.38,0.38,0.38
TB,CTE,matid,
TBDATA,1,1.28e-05,1.28e-05,1.28e-05
TB,PLAS,matid
TB,XTAL,matid,,3,ORIE
TBDATA,1,108.68475341796875,0.0,0.0
TB,XTAL,matid,,1,NSLFAM
TBDATA,1,1
TB,XTAL,matid,,1,FORM
TBDATA,1,2
TB,XTAL,matid,,6,XPARAM
TBDATA,1,1,0,7,12,0,1
TB,XTAL,matid,1,6,HARD
TBTEMP,298.0,
TBDATA,1,220.0,1750.0,400.0,2,0,1.4
TB,XTAL,matid,1,6,FLFCC
TBTEMP,298.0,
TBDATA,1,1732000.0,0.131,1.1,0.7,2.5e-19,1
CMSEL,S,GID7
EMODIF,ALL,MAT,matid
ALLSEL,ALL


*SET,matid,8
TB,ELAS,matid,,9,
TBDATA,1,70000.0,70000.0,70000.0,50724.637681159424,50724.637681159424,50724.637681159424
TBDATA,7,0.38,0.38,0.38
TB,CTE,matid,
TBDATA,1,1.28e-05,1.28e-05,1.28e-05
TB,PLAS,matid
TB,XTAL,matid,,3,ORIE
TBDATA,1,-102.53095245361328,0.0,0.0
TB,XTAL,matid,,1,NSLFAM
TBDATA,1,1
TB,XTAL,matid,,1,FORM
TBDATA,1,2
TB,XTAL,matid,,6,XPARAM
TBDATA,1,1,0,8,12,0,1
TB,XTAL,matid,1,6,HARD
TBTEMP,298.0,
TBDATA,1,220.0,1750.0,400.0,2,0,1.4
TB,XTAL,matid,1,6,FLFCC
TBTEMP,298.0,
TBDATA,1,1732000.0,0.131,1.1,0.7,2.5e-19,1
CMSEL,S,GID8
EMODIF,ALL,MAT,matid
ALLSEL,ALL


*SET,matid,9
TB,ELAS,matid,,9,
TBDATA,1,70000.0,70000.0,70000.0,50724.637681159424,50724.637681159424,50724.637681159424
TBDATA,7,0.38,0.38,0.38
TB,CTE,matid,
TBDATA,1,1.28e-05,1.28e-05,1.28e-05
TB,PLAS,matid
TB,XTAL,matid,,3,ORIE
TBDATA,1,140.518310546875,0.0,0.0
TB,XTAL,matid,,1,NSLFAM
TBDATA,1,1
TB,XTAL,matid,,1,FORM
TBDATA,1,2
TB,XTAL,matid,,6,XPARAM
TBDATA,1,1,0,9,12,0,1
TB,XTAL,matid,1,6,HARD
TBTEMP,298.0,
TBDATA,1,220.0,1750.0,400.0,2,0,1.4
TB,XTAL,matid,1,6,FLFCC
TBTEMP,298.0,
TBDATA,1,1732000.0,0.131,1.1,0.7,2.5e-19,1
CMSEL,S,GID9
EMODIF,ALL,MAT,matid
ALLSEL,ALL


ALLSEL,ALL
TREF,298.0
TUNIF,298.0
/SOLU
